2017-08-27
오후 01:04
;; 1. Based on:
;; 2. Description: Final PK model
;; x1. Author: user
;; 3. Label:
$PROBLEM    Final PK model
$INPUT      ID TIMEM=DROP TIME RAWDV=DROP DV AMT IIMIN=DROP II ADDL
            CMT DOSE=DROP OXY=DROP SEX PERIOD=DROP WATER=DROP MDV
            AGE=DROP HT=DROP WT SCR=DROP AST=DROP ALT=DROP
; Units

;; DV = g/L

;; AMT = g
$DATA      PKdata_ver5.csv IGNORE=#
$SUBROUTINE ADVAN6 TOL=6
$MODEL      NCOMP=2 COMP=(DEPOT) COMP=(CENTRAL)
$PK
;;; VMSEX-DEFINITION START
IF(SEX.EQ.1) VMSEX = 1  ; Most common
IF(SEX.EQ.2) VMSEX = ( 1 + THETA(8))
;;; VMSEX-DEFINITION END

;;; VM-RELATION START
VMCOV=VMSEX
;;; VM-RELATION END

;;; VCWT-DEFINITION START
VCWT = ( 1 + THETA(7)*(WT - 69))
;;; VCWT-DEFINITION END

;;; VC-RELATION START
VCCOV=VCWT
;;; VC-RELATION END

; Population parameter
TVKA = THETA(1)
TVVC = THETA(2)
TVVC = VCCOV*TVVC
TVVM = THETA(3)
TVVM = VMCOV*TVVM
TVKM = THETA(4)

; Individual parameter
KA = TVKA; * EXP(ETA(1))
VC = TVVC * EXP(ETA(1))
VM = TVVM * EXP(ETA(2))
KM = TVKM; * EXP(ETA(2))

S2 = VC
;KEL = CL/VC

$DES
CONC = A(2)/VC
DADT(1) =  -KA*A(1)
DADT(2) = KA*A(1) - VM*CONC/(KM+CONC)

$ERROR
IPRED = F
    W = SQRT(THETA(5)**2*IPRED**2 + THETA(6)**2)
    Y = IPRED + W*EPS(1)
 IRES = DV-IPRED
IWRES = IRES/W

$THETA  (0,8.09658) ; 1.KA
 (0,73.6782) ; 2.VC
 (0,9.64917) ; 3.Vmax
 (0,0.0408837) ; 4. Km
 (0,0.179277) ; Prop.RE (sd)
 (0,0.001) FIX ; Add.RE (sd)
$THETA  (-0.111,0.016739,0.045) ; VCWT1
$THETA  (-1,-0.235138,5) ; VMSEX1
$OMEGA  0.0498046  ;         VC
 0.0116147  ;         VM
;0.47 2.71  ; KM
$SIGMA  1  FIX  ; Proportional error PK
$ESTIMATION METHOD=1 INTER MAXEVAL=5000 NOABORT NSIG=3 SIGL=6 PRINT=5
; Xpose
$TABLE      ID TIME DV MDV IPRED IWRES CWRES ONEHEADER NOPRINT
            FILE=sdtab206
$TABLE      ID VC KA VM KM ETA(1) ETA(2) ONEHEADER NOPRINT
            FILE=patab206
;$TABLE ID SEX ONEHEADER NOPRINT FILE=catab206

;$TABLE ID AGE HT WT SCR AST ALT ONEHEADER NOPRINT FILE=cotab206
$COVARIANCE

NM-TRAN MESSAGES
 WARNINGS AND ERRORS (IF ANY) FOR PROBLEM    1
 (WARNING  2) NM-TRAN INFERS THAT THE DATA ARE POPULATION.

1NONLINEAR MIXED EFFECTS MODEL PROGRAM (NONMEM) VERSION 7.3.0
 ORIGINALLY DEVELOPED BY STUART BEAL, LEWIS SHEINER, AND ALISON BOECKMANN
 CURRENT DEVELOPERS ARE ROBERT BAUER, ICON DEVELOPMENT SOLUTIONS,
 AND ALISON BOECKMANN. IMPLEMENTATION, EFFICIENCY, AND STANDARDIZATION
 PERFORMED BY NOUS INFOSYSTEMS.
 PROBLEM NO.:         1
 Final PK model
 TOT. NO. OF OBS RECS:      823
 TOT. NO. OF INDIVIDUALS:     53
 GENERAL NONLINEAR KINETICS MODEL (ADVAN6)
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 #TBLN:      1
 #METH: First Order Conditional Estimation with Interaction
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
 #TERM:
0MINIMIZATION SUCCESSFUL
 HOWEVER, PROBLEMS OCCURRED WITH THE MINIMIZATION.
 REGARD THE RESULTS OF THE ESTIMATION STEP CAREFULLY, AND ACCEPT THEM ONLY
 AFTER CHECKING THAT THE COVARIANCE STEP PRODUCES REASONABLE OUTPUT.
 NO. OF FUNCTION EVALUATIONS USED:       96
 NO. OF SIG. DIGITS IN FINAL EST.:  3.1

 ETABAR IS THE ARITHMETIC MEAN OF THE ETA-ESTIMATES,
 AND THE P-VALUE IS GIVEN FOR THE NULL HYPOTHESIS THAT THE TRUE MEAN IS 0.

 ETABAR:        -6.1782E-03  6.4498E-03
 SE:             2.9476E-02  1.3257E-02
 N:                      53          53

 P VAL.:         8.3398E-01  6.2659E-01

 ETAshrink(%):   2.9236E+00  9.5943E+00
 EBVshrink(%):   3.8670E+00  1.1215E+01
 EPSshrink(%):   5.3806E+00

 #TERE:
 Elapsed estimation time in seconds:    10.95
 Elapsed covariance time in seconds:    24.39

 ********************               FIRST ORDER CONDITIONAL ESTIMATION WITH INTERACTION              ********************
 #OBJT:**************                       MINIMUM VALUE OF OBJECTIVE FUNCTION                      ********************
 #OBJV:********************************************    -2477.214       **************************************************

 ********************               FIRST ORDER CONDITIONAL ESTIMATION WITH INTERACTION              ********************
 ********************                             FINAL PARAMETER ESTIMATE                           ********************

 THETA - VECTOR OF FIXED EFFECTS PARAMETERS   *********
         TH 1      TH 2      TH 3      TH 4      TH 5      TH 6      TH 7      TH 8
         8.10E+00  7.37E+01  9.65E+00  4.09E-02  1.79E-01  1.00E-03  1.67E-02 -2.35E-01

 OMEGA - COV MATRIX FOR RANDOM EFFECTS - ETAS  ********
            ETA1      ETA2
 ETA1
+        4.98E-02
 ETA2
+        0.00E+00  1.16E-02

 SIGMA - COV MATRIX FOR RANDOM EFFECTS - EPSILONS  ****
            EPS1
 EPS1
+        1.00E+00

 OMEGA - CORR MATRIX FOR RANDOM EFFECTS - ETAS  *******
            ETA1      ETA2
 ETA1
+        2.23E-01
 ETA2
+        0.00E+00  1.08E-01

 SIGMA - CORR MATRIX FOR RANDOM EFFECTS - EPSILONS  ***
            EPS1
 EPS1
+        1.00E+00

 ********************               FIRST ORDER CONDITIONAL ESTIMATION WITH INTERACTION              ********************
 ********************                            STANDARD ERROR OF ESTIMATE                          ********************

 THETA - VECTOR OF FIXED EFFECTS PARAMETERS   *********
         TH 1      TH 2      TH 3      TH 4      TH 5      TH 6      TH 7      TH 8
         1.87E+00  2.65E+00  7.03E-01  4.27E-02  7.20E-03 .........  2.03E-03  2.87E-02

 OMEGA - COV MATRIX FOR RANDOM EFFECTS - ETAS  ********
            ETA1      ETA2
 ETA1
+        1.04E-02
 ETA2
+       .........  5.39E-03

 SIGMA - COV MATRIX FOR RANDOM EFFECTS - EPSILONS  ****
            EPS1
 EPS1
+       .........

 OMEGA - CORR MATRIX FOR RANDOM EFFECTS - ETAS  *******
            ETA1      ETA2
 ETA1
+        2.33E-02
 ETA2
+       .........  2.50E-02

 SIGMA - CORR MATRIX FOR RANDOM EFFECTS - EPSILONS  ***
            EPS1
 EPS1
+       .........

 ********************               FIRST ORDER CONDITIONAL ESTIMATION WITH INTERACTION              ********************
 ********************                          COVARIANCE MATRIX OF ESTIMATE                         ********************

            TH 1      TH 2      TH 3      TH 4      TH 5      TH 6      TH 7      TH 8      OM11      OM12      OM22      SG11
 TH 1
+        3.50E+00
 TH 2
+       -5.04E-01  7.04E+00
 TH 3
+       -4.79E-01 -9.73E-02  4.95E-01
 TH 4
+       -3.16E-02 -5.26E-06  2.89E-02  1.83E-03
 TH 5
+       -3.58E-04  6.49E-03  1.88E-04  3.38E-05  5.18E-05
 TH 6
+       ......... ......... ......... ......... ......... .........
 TH 7
+       -1.74E-04  3.71E-03 -7.43E-05  4.15E-07  3.01E-06 .........  4.12E-06
 TH 8
+        8.09E-04  7.01E-03 -1.16E-02 -5.58E-04  1.53E-05 ......... -4.27E-06  8.25E-04
 OM11
+       -2.10E-03  1.10E-02  3.19E-03  2.12E-04  1.97E-05 .........  5.50E-06 -5.85E-05  1.08E-04
 OM12
+       ......... ......... ......... ......... ......... ......... ......... ......... ......... .........
 OM22
+        1.26E-03  3.13E-03  1.43E-04 -2.84E-05 -4.91E-06 .........  1.52E-06 -3.16E-05  1.60E-06 .........  2.90E-05
 SG11
+       ......... ......... ......... ......... ......... ......... ......... ......... ......... ......... ......... .........

 ********************               FIRST ORDER CONDITIONAL ESTIMATION WITH INTERACTION              ********************
 ********************                          CORRELATION MATRIX OF ESTIMATE                        ********************

            TH 1      TH 2      TH 3      TH 4      TH 5      TH 6      TH 7      TH 8      OM11      OM12      OM22      SG11
 TH 1
+        1.87E+00
 TH 2
+       -1.02E-01  2.65E+00
 TH 3
+       -3.64E-01 -5.21E-02  7.03E-01
 TH 4
+       -3.96E-01 -4.63E-05  9.61E-01  4.27E-02
 TH 5
+       -2.66E-02  3.39E-01  3.72E-02  1.10E-01  7.20E-03
 TH 6
+       ......... ......... ......... ......... ......... .........
 TH 7
+       -4.58E-02  6.89E-01 -5.20E-02  4.78E-03  2.06E-01 .........  2.03E-03
 TH 8
+        1.51E-02  9.19E-02 -5.76E-01 -4.55E-01  7.42E-02 ......... -7.32E-02  2.87E-02
 OM11
+       -1.08E-01  4.00E-01  4.36E-01  4.76E-01  2.63E-01 .........  2.61E-01 -1.96E-01  1.04E-02
 OM12
+       ......... ......... ......... ......... ......... ......... ......... ......... ......... .........
 OM22
+        1.25E-01  2.19E-01  3.78E-02 -1.23E-01 -1.27E-01 .........  1.39E-01 -2.04E-01  2.86E-02 .........  5.39E-03
 SG11
+       ......... ......... ......... ......... ......... ......... ......... ......... ......... ......... ......... .........
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 #CPUT: Total CPU Time in Seconds,       36.063
